g := 9.8
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m := 1
len := 1
Ω := 5
λ := g/(len*Ω^2) = 0.392
γ := len^2*m
time_start := 0
time_end := 5
time_count := 1*10^2 - 1
D(u, Y) := [Y[1]; m*len^2*Ω^2/γ*sin(Y[0])*(cos(Y[0]) - λ)]
Equation(a, b) := Rkadapt([a; b], time_start, time_end, time_count, D)
x_0 := -π
y_0 := -4
x_n := π
y_n := 4
x_count := 7
y_count := 9
X_st := x_0, x_0 + (x_n - x_0)/(x_count - 1) .. x_n
Y_st := y_0, y_0 + (y_n - y_0)/(y_count - 1) .. y_n
M_XYT :=
    k ← 0
    for x ∈ X_st
        for y ∈ Y_st
            M_XY ← Equation(x, y)
            k ← k + 1
            if k == 1
                M_TIME ← M_XY[:, 0]
                M_X ← M_XY[:, 1]
                M_Y ← M_XY[:, 2]
            otherwise
                M_TIME ← augment(M_TIME, M_XY[:, 0])
                M_X ← augment(M_X, M_XY[:, 1])
                M_Y ← augment(M_Y, M_XY[:, 2])
    [M_X; M_Y; M_TIME]
alpha_2d := M_XYT[0][:, 29]
w_round_2d := M_XYT[1][:, 29]
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R := len
MMM :=
    kk ← 0
    for j ∈ 0 .. cols(M_XYT[0]) - 1
        k ← 0
        for i ∈ 0 .. rows(M_XYT[0]) - 1
            X ← M_XYT[0][i, j]
            Y ← M_XYT[1][i, j]
            TIME ← M_XYT[1][i, j]
            if (|X| ≤ π)
                M_X[k] ← R*cos(X)
                M_Y[k] ← R*sin(X)
                M_Z[k] ← Y
                M_T[k] ← TIME
                k ← k + 1
        MM[j] ← [M_X; M_Y; M_Z]
        MT[j] ← M_T
    [MM; MT]
alpha_3d_x := MMM[0][29][0][:, 0]
alpha_3d_y := MMM[0][29][1][:, 0]
w_round_3d := MMM[0][29][2][:, 0]
XXX := MMM[0][29][0][:, 0]
YYY := MMM[0][29][1][:, 0]
ZZZ := MMM[0][29][2][:, 0]
# [component: inputs MMM[0], ([alpha_3d_x[FRAME]], [alpha_3d_y[FRAME]], [w_round_3d[FRAME]])]
# [component: inputs ([0], [0], [0]), ([YYY[FRAME]], [YYY[FRAME]], [-XXX[FRAME]])]
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